AnyFolder Pelvis = {
  AnyVar Mass = 0.142*.BodyParameters.BodyMass; //Winter
  #if RIGHT_LEG + LEFT_LEG == 0
  AnyVar Width = 0.176;
  #else
  AnyVar Width = 0.16;
  #endif

  /*
  AnyVar Length = ( (0.06+0.012)^2 + (0.06+0.126)^2 + 0.023^2 )^0.5;
  AnyVar Density = .BodyParameters.Density;
  */
};

AnyFolder Trunk = {

  AnyVec3 C1HatNode = {0.026,0.6,0};
  //AnyVec3 L5SacrumJnt = {0.043,-0.005,0.0};
  AnyVec3 L5SacrumJnt = {0.043,-0.02,0.0};
  AnyVar Height = ( (C1HatNode[0] - L5SacrumJnt[0])^2 + (C1HatNode[1] - L5SacrumJnt[1])^2 )^0.5;
  AnyVar Mass = 0.1894*.BodyParameters.BodyMass; // C7-T1 to T12-L1 (modified from 0.216 winter to separate scapula)
};

AnyFolder Head ={
  AnyVar Mass = 0.081*.BodyParameters.BodyMass; //C7-T1 to ear canal
  AnyVar Height =  0.14;
};

AnyFolder Lumbar = {
  AnyVar Mass = 0.139*.BodyParameters.BodyMass; //Standard mass of the lumbar part
};

AnyFolder CervicalSpine = {
  AnyVar Mass = 0.26*0.081*.BodyParameters.BodyMass; //Standard mass of the cervical part
};

AnyFolder HeadWithoutNeck = {
  AnyVar Mass = 0.74*0.081*.BodyParameters.BodyMass;
  AnyVar Height =  0.14;
};
