#class_template JointAngleOuputFile(__CLASS__ = AnyOutputFile){
  #var FileName;
  SepSign = ",";
  Header = {
    TitleSectionOnOff = Off;
    ConstSectionOnOff = Off;
    ConstSectionSaveOptionsOnOff = Off;
    VarSectionOnOff = Off;
    ShortenNamesOnOff = Off;
  };
};

AnyFolder JointAngleOutputs = {

  AnyString BaseName = TEMP_PATH+"/"+ MOCAP_TEST_FILENAME_PREFIX + MOCAP_OUTPUT_FILENAME_PREFIX + Main.ModelSetup.TrialSpecificData.TrialFileName;

  JointAngleOuputFile OutputFile_TrunkFull =
  {
    FileName = .BaseName + "-rotvec-trunk-full.txt";
//    AnyVector DOF = ..BodyModel.Interface.Trunk.DOFs.Pos;
    Values = {
      &..BodyModel.Interface.Trunk.PelvisPosX.Pos,
      &..BodyModel.Interface.Trunk.PelvisPosY.Pos,
      &..BodyModel.Interface.Trunk.PelvisPosZ.Pos,
      &..BodyModel.Interface.Trunk.PelvisRotVec.Pos,
      &..BodyModel.Interface.Trunk.Spine.SacrumPelvis.Pos,
      &..BodyModel.Interface.Trunk.Spine.L5Sacrum.Pos,
      &..BodyModel.Interface.Trunk.Spine.L4L5.Pos,
      &..BodyModel.Interface.Trunk.Spine.L3L4.Pos,
      &..BodyModel.Interface.Trunk.Spine.L2L3.Pos,
      &..BodyModel.Interface.Trunk.Spine.L1L2.Pos,
      &..BodyModel.Interface.Trunk.Spine.T12L1.Pos,
      &..BodyModel.Interface.Trunk.Spine.T1C7.Pos,
      &..BodyModel.Interface.Trunk.Spine.C7C6.Pos,
      &..BodyModel.Interface.Trunk.Spine.C6C5.Pos,
      &..BodyModel.Interface.Trunk.Spine.C5C4.Pos,
      &..BodyModel.Interface.Trunk.Spine.C4C3.Pos,
      &..BodyModel.Interface.Trunk.Spine.C3C2.Pos,
      &..BodyModel.Interface.Trunk.Spine.C2C1.Pos,
      &..BodyModel.Interface.Trunk.Spine.C1C0.Pos,
    };
  };


#if BM_LEG_LEFT
  JointAngleOuputFile OutputFile_LeftLeg =
  {
    #if BM_LEG_MODEL_IS_TLEM
    FileName = .BaseName + "-euler-left_leg_tlem.txt";
    Values = {
      &..BodyModel.Interface.Left.HipFlexion.Pos,
      &..BodyModel.Interface.Left.HipAbduction.Pos,
      &..BodyModel.Interface.Left.HipExternalRotation.Pos,
      &..BodyModel.Interface.Left.KneeFlexion.Pos,
      &..BodyModel.Interface.Left.AnklePlantarFlexion.Pos,
      &..BodyModel.Interface.Left.SubTalarEversion.Pos
    };
    #else
    FileName = .BaseName + "-euler-left_leg.txt";
    Values = {
      &..BodyModel.Interface.Left.HipFlexion.Pos,
      &..BodyModel.Interface.Left.HipAbduction.Pos,
      &..BodyModel.Interface.Left.HipExternalRotation.Pos,
      &..BodyModel.Interface.Left.KneeFlexion.Pos,
      &..BodyModel.Interface.Left.AnklePlantarFlexion.Pos,
      &..BodyModel.Interface.Left.AnkleEversion.Pos
    };
    #endif
  };
#endif


#if BM_LEG_RIGHT
  JointAngleOuputFile OutputFile_RightLeg =
  {
    #if BM_LEG_MODEL_IS_TLEM
    FileName = .BaseName + "-euler-right_leg_tlem.txt";
    Values = {
      &..BodyModel.Interface.Right.HipFlexion.Pos,
      &..BodyModel.Interface.Right.HipAbduction.Pos,
      &..BodyModel.Interface.Right.HipExternalRotation.Pos,
      &..BodyModel.Interface.Right.KneeFlexion.Pos,
      &..BodyModel.Interface.Right.AnklePlantarFlexion.Pos,
      &..BodyModel.Interface.Right.SubTalarEversion.Pos
    };
    #else
    FileName = TEMP_PATH+"/"+ BaseName + "-euler-right_leg.txt";
    Values = {
      &..BodyModel.Interface.Right.HipFlexion.Pos,
      &..BodyModel.Interface.Right.HipAbduction.Pos,
      &..BodyModel.Interface.Right.HipExternalRotation.Pos,
      &..BodyModel.Interface.Right.KneeFlexion.Pos,
      &..BodyModel.Interface.Right.AnklePlantarFlexion.Pos,
      &..BodyModel.Interface.Right.AnkleEversion.Pos
    };
    #endif
  };
#endif


#if BM_ARM_LEFT == ON

  JointAngleOuputFile OutputFile_LeftArm =
  {
    FileName = .BaseName + "-rotvec-left_arm_shoulder.txt";
    Values = {
      &..BodyModel.Interface.Left.RotVectorMeasures.ThoraxClavicula.Pos,
      &..BodyModel.Interface.Left.RotVectorMeasures.ClaviculaScapula.Pos,
      &..BodyModel.Interface.Left.RotVectorMeasures.ScapulaHumerus.Pos,
      &..BodyModel.Interface.Left.ElbowFlexion.Pos,
      &..BodyModel.Interface.Left.ElbowPronation.Pos,
      &..BodyModel.Interface.Left.WristFlexion.Pos,
      &..BodyModel.Interface.Left.WristAbduction.Pos,
    };
  };

  #if BM_ARM_DETAILED_HAND
  JointAngleOuputFile OutputFile_LeftDetailedHand = {
    FileName = .BaseName + "-euler-left_detailed_hand.txt";
    Values = {
      &..BodyModel.Interface.Left.CMCFlexion.Pos,
      &..BodyModel.Interface.Left.CMCAbduction.Pos,
      &..BodyModel.Interface.Left.MCPFlexion.Pos,
      &..BodyModel.Interface.Left.MCPAbduction.Pos,
      &..BodyModel.Interface.Left.DIP.Pos,
      &..BodyModel.Left.ShoulderArm.Seg.Hand.Finger2.Jnt.MCP.Pos,
      &..BodyModel.Left.ShoulderArm.Seg.Hand.Finger2.Jnt.PIP.Pos,
      &..BodyModel.Left.ShoulderArm.Seg.Hand.Finger2.Jnt.DIP.Pos,
      &..BodyModel.Left.ShoulderArm.Seg.Hand.Finger3.Jnt.MCP.Pos,
      &..BodyModel.Left.ShoulderArm.Seg.Hand.Finger3.Jnt.PIP.Pos,
      &..BodyModel.Left.ShoulderArm.Seg.Hand.Finger3.Jnt.DIP.Pos,
      &..BodyModel.Left.ShoulderArm.Seg.Hand.Finger4.Jnt.MCP.Pos,
      &..BodyModel.Left.ShoulderArm.Seg.Hand.Finger4.Jnt.PIP.Pos,
      &..BodyModel.Left.ShoulderArm.Seg.Hand.Finger4.Jnt.DIP.Pos,
      &..BodyModel.Left.ShoulderArm.Seg.Hand.Finger5.Jnt.MCP.Pos,
      &..BodyModel.Left.ShoulderArm.Seg.Hand.Finger5.Jnt.PIP.Pos,
      &..BodyModel.Left.ShoulderArm.Seg.Hand.Finger5.Jnt.DIP.Pos
    };
  };
  #endif

#endif


#if BM_ARM_RIGHT == ON

  JointAngleOuputFile OutputFile_RightArm = {
    FileName = .BaseName + "-rotvec-right_arm_shoulder.txt";
    Values = {
      &..BodyModel.Interface.Right.RotVectorMeasures.ThoraxClavicula.Pos,
      &..BodyModel.Interface.Right.RotVectorMeasures.ClaviculaScapula.Pos,
      &..BodyModel.Interface.Right.RotVectorMeasures.ScapulaHumerus.Pos,
      &..BodyModel.Interface.Right.ElbowFlexion.Pos,
      &..BodyModel.Interface.Right.ElbowPronation.Pos,
      &..BodyModel.Interface.Right.WristFlexion.Pos,
      &..BodyModel.Interface.Right.WristAbduction.Pos,

    };
  };

  #if BM_ARM_DETAILED_HAND
  JointAngleOuputFile OutputFile_RightDetailedHand = {
    FileName = .BaseName + "-euler-right_detailed_hand.txt";
    Values = {
      &..BodyModel.Interface.Right.CMCFlexion.Pos,
      &..BodyModel.Interface.Right.CMCAbduction.Pos,
      &..BodyModel.Interface.Right.MCPFlexion.Pos,
      &..BodyModel.Interface.Right.MCPAbduction.Pos,
      &..BodyModel.Interface.Right.DIP.Pos,
      &..BodyModel.Right.ShoulderArm.Seg.Hand.Finger2.Jnt.MCP.Pos,
      &..BodyModel.Right.ShoulderArm.Seg.Hand.Finger2.Jnt.PIP.Pos,
      &..BodyModel.Right.ShoulderArm.Seg.Hand.Finger2.Jnt.DIP.Pos,
      &..BodyModel.Right.ShoulderArm.Seg.Hand.Finger3.Jnt.MCP.Pos,
      &..BodyModel.Right.ShoulderArm.Seg.Hand.Finger3.Jnt.PIP.Pos,
      &..BodyModel.Right.ShoulderArm.Seg.Hand.Finger3.Jnt.DIP.Pos,
      &..BodyModel.Right.ShoulderArm.Seg.Hand.Finger4.Jnt.MCP.Pos,
      &..BodyModel.Right.ShoulderArm.Seg.Hand.Finger4.Jnt.PIP.Pos,
      &..BodyModel.Right.ShoulderArm.Seg.Hand.Finger4.Jnt.DIP.Pos,
      &..BodyModel.Right.ShoulderArm.Seg.Hand.Finger5.Jnt.MCP.Pos,
      &..BodyModel.Right.ShoulderArm.Seg.Hand.Finger5.Jnt.PIP.Pos,
      &..BodyModel.Right.ShoulderArm.Seg.Hand.Finger5.Jnt.DIP.Pos
    };
  };

  #endif

#endif

#if (ANYBODY_V1 > 8) | (ANYBODY_V1 == 8 & ANYBODY_V2 > 1) | (ANYBODY_V1 == 8 & ANYBODY_V2 == 1 & ANYBODY_V3 > 2 )
AnyFolder   AllDoFs = {
  AnyStringVar HeaderPrefix ??= "DOF:";
  AnyFloat Values = Obj2NumFlatten(flattenptr(ObjSearch(ObjGetParent(), "OutputFile*.Values")));
  AnyStringArray HeaderNames = take(
       arrcat(
          repmat(NumElemOf(Obj2StrFlatten(flattenptr(ObjSearch(ObjGetParent(),"OutputFile*.ColumnNames")))), HeaderPrefix) +
          Obj2StrFlatten(flattenptr(ObjSearch(ObjGetParent(),"OutputFile*.ColumnNames"))),
          repmat(NumElemOf(Values),"")
       ),
       iarr(0, NumElemOf(Values)-1)
    );
};
#endif

}; //JointAngleOutputs
